// SBML level 3 version 1

model rec_mech2_5_4()
  // model units - substance: substance, time: time, volume: volume, area: area, length: length, extent: substance

  // Compartments:
  compartment kinetics_464_0_ = 1.007394e-12 volume;

  // Species:
  species PIP2_468_0_ in kinetics_464_0_ = 0.01;
  species IRSp53_dimer_470_0_ in kinetics_464_0_ = 0.0012;
  // We should note that binding to IBAR halts PIP2 lateral diffusion Zhao et al., Cell reports, 2013
  species IP_clx_472_0_ in kinetics_464_0_ = 0;
  species IRSp53_474_0_ in kinetics_464_0_ = 0.0012;
  species height_476_0_ in kinetics_464_0_ = 0;
  species Rad_478_0_ in kinetics_464_0_ = 1.648351e-18;
  // This should have diffusion proportional to the curvature formed.
  species curv_IRSp53_480_0_ in kinetics_464_0_ = 0;
  species Ipool_482_0_ in kinetics_464_0_ = 0;
  species sort_484_0_ in kinetics_464_0_ = 0;
  species IRSp53_a_486_0_ in kinetics_464_0_ = 0;
  species Cdc42_488_0_ in kinetics_464_0_ = 0.01;
  species Eps8_490_0_ in kinetics_464_0_ = 0.00083;
  species IRSp53_m_492_0_ in kinetics_464_0_ = 0;
  species curv_494_0_ in kinetics_464_0_ = 0;
  species cPIP2_496_0_ in kinetics_464_0_ = 0;
  species cip2_498_0_ in kinetics_464_0_ = 0;
  species cip3_500_0_ in kinetics_464_0_ = 0;
  species curv_pip_502_0_ in kinetics_464_0_ = 0;
  species detach_504_0_ in kinetics_464_0_ = 0;
  species Enz2_cplx_515_0_ in kinetics_464_0_ = 0;
  species Enz_cplx_518_0_ in kinetics_464_0_ = 0;
  species Enz_cplx_521_0_ in kinetics_464_0_ = 0;
  species Enz_cplx_524_0_ in kinetics_464_0_ = 0;

  // Reactions:
  // kinetics_464_0_ * Reac2_510_0__Kf * Eps8_490_0_^2*IRSp53_a_486_0_-kinetics_464_0_ * Reac2_510_0__Kb * IRSp53_m_492_0_
  Reac2_510_0_: 2 Eps8_490_0_ + IRSp53_a_486_0_ -> IRSp53_m_492_0_; kinetics_464_0_*Reac2_510_0__Kf*Eps8_490_0_^2*IRSp53_a_486_0_ - kinetics_464_0_*Reac2_510_0__Kb*IRSp53_m_492_0_;
    Reac2_510_0__Kf = 1000000 sq_litre_per_mmole_sq_per_second; Reac2_510_0__Kb = 0.01 per_second;
  // kinetics_464_0_ * Reac_512_0__Kf * Cdc42_488_0_^2*IRSp53_dimer_470_0_-kinetics_464_0_ * Reac_512_0__Kb * IRSp53_a_486_0_
  // sudhaharan et al., Kd
  Reac_512_0_: 2 Cdc42_488_0_ + IRSp53_dimer_470_0_ -> IRSp53_a_486_0_; kinetics_464_0_*Reac_512_0__Kf*Cdc42_488_0_^2*IRSp53_dimer_470_0_ - kinetics_464_0_*Reac_512_0__Kb*IRSp53_a_486_0_;
    Reac_512_0__Kf = 100000000 sq_litre_per_mmole_sq_per_second; Reac_512_0__Kb = 4 per_second;
  // kinetics_464_0_ * ( k1 * IRSp53_m_492_0_*curv_494_0_ - k2 * Enz2_cplx_515_0_ )
  Enz_514_0_Complex_formation_: IRSp53_m_492_0_ + curv_494_0_ -> Enz2_cplx_515_0_; kinetics_464_0_*(Enz_514_0_Complex_formation__k1*IRSp53_m_492_0_*curv_494_0_ - Enz_514_0_Complex_formation__k2*Enz2_cplx_515_0_);
    Enz_514_0_Complex_formation__k1 = 25000000 litre_per_mmole_per_second; Enz_514_0_Complex_formation__k2 = 20 per_second;
  // kinetics_464_0_ * k3*Enz2_cplx_515_0_
  Enz_514_0_Product_formation_: Enz2_cplx_515_0_ => curv_IRSp53_480_0_ + curv_494_0_; kinetics_464_0_*Enz_514_0_Product_formation__k3*Enz2_cplx_515_0_;
    Enz_514_0_Product_formation__k3 = 5 per_second;
  // kinetics_464_0_ * ( k1 * PIP2_468_0_*curv_pip_502_0_ - k2 * Enz_cplx_518_0_ )
  Enz_517_0_Complex_formation_: PIP2_468_0_ + curv_pip_502_0_ -> Enz_cplx_518_0_; kinetics_464_0_*(Enz_517_0_Complex_formation__k1*PIP2_468_0_*curv_pip_502_0_ - Enz_517_0_Complex_formation__k2*Enz_cplx_518_0_);
    Enz_517_0_Complex_formation__k1 = 5000000000 litre_per_mmole_per_second; Enz_517_0_Complex_formation__k2 = 4 per_second;
  // kinetics_464_0_ * k3*Enz_cplx_518_0_
  Enz_517_0_Product_formation_: Enz_cplx_518_0_ => cPIP2_496_0_ + curv_pip_502_0_; kinetics_464_0_*Enz_517_0_Product_formation__k3*Enz_cplx_518_0_;
    Enz_517_0_Product_formation__k3 = 1 per_second;
  // kinetics_464_0_ * ( k1 * curv_IRSp53_480_0_*sort_484_0_ - k2 * Enz_cplx_521_0_ )
  Enz_520_0_Complex_formation_: curv_IRSp53_480_0_ + sort_484_0_ -> Enz_cplx_521_0_; kinetics_464_0_*(Enz_520_0_Complex_formation__k1*curv_IRSp53_480_0_*sort_484_0_ - Enz_520_0_Complex_formation__k2*Enz_cplx_521_0_);
    Enz_520_0_Complex_formation__k1 = 5e-12 litre_per_mmole_per_second; Enz_520_0_Complex_formation__k2 = 4e-15 per_second;
  // kinetics_464_0_ * k3*Enz_cplx_521_0_
  Enz_520_0_Product_formation_: Enz_cplx_521_0_ => cip2_498_0_ + sort_484_0_; kinetics_464_0_*Enz_520_0_Product_formation__k3*Enz_cplx_521_0_;
    Enz_520_0_Product_formation__k3 = 1e-15 per_second;
  // kinetics_464_0_ * ( k1 * detach_504_0_*curv_IRSp53_480_0_ - k2 * Enz_cplx_524_0_ )
  Enz_523_0_Complex_formation_: detach_504_0_ + curv_IRSp53_480_0_ -> Enz_cplx_524_0_; kinetics_464_0_*(Enz_523_0_Complex_formation__k1*detach_504_0_*curv_IRSp53_480_0_ - Enz_523_0_Complex_formation__k2*Enz_cplx_524_0_);
    Enz_523_0_Complex_formation__k1 = 5e-12 litre_per_mmole_per_second; Enz_523_0_Complex_formation__k2 = 4e-15 per_second;
  // kinetics_464_0_ * k3*Enz_cplx_524_0_
  Enz_523_0_Product_formation_: Enz_cplx_524_0_ => detach_504_0_ + IRSp53_m_492_0_; kinetics_464_0_*Enz_523_0_Product_formation__k3*Enz_cplx_524_0_;
    Enz_523_0_Product_formation__k3 = 1e-15 per_second;

  // Unit definitions:
  unit volume = litre;
  unit substance = 1e-3 mole;
  unit length = metre;
  unit area = metre^2;
  unit time = second;
  unit sq_litre_per_mmole_sq_per_second = litre^2 / ((1e-3 mole)^2 * second);
  unit per_second = 1 / second;
  unit litre_per_mmole_per_second = litre / (1e-3 mole * second);
end
